OpenVSP model (file version 4), 2 components.
Geometry view with OpenVSP parameter names; values to 6 digits, angles in degrees, lengths in the model's unit.
Overall bounding box: X_Min=-4.95227e-05 X_Len=8.50006 Y_Min=-11.1501 Y_Len=22.3001 Z_Min=-0.321733 Z_Len=4.32173

Wing "WingGeom"
  location (X Y Z) 0 0 0, rotation 0 0 0
  symmetric about XZ
  bounding box size 7.50005 22 1.02036
  totals: TotalSpan=22 TotalProjectedSpan=22 TotalChord=5.25 TotalArea=115.5 TotalAR=4.19048
  root: chord 7.5, twist 0, airfoil file "EPPLER 625 AIRFOIL"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 ThickChord=0.1
  sections:
    n  Span  Root_Chord  Tip_Chord  Area   Sweep  Sweep_Location  Dihedral  Twist  Twist_Location  tip airfoil
    1  11    7.5         3          57.75  0      1               0         -4     0.25            as above

Wing "WingGeom", child of "WingGeom"
  location (X Y Z) 4.5 11 0, rotation 90 0 0
  symmetric about XZ
  bounding box size 4.00001 22.3001 4
  totals: TotalSpan=8 TotalProjectedSpan=8 TotalChord=2 TotalArea=16 TotalAR=4
  root: chord 3, twist 0, NACA 4-series Camber=0 CamberLoc=0.2 ThickChord=0.1
  sections:
    n  Span  Root_Chord  Tip_Chord  Area  Sweep  Sweep_Location  Dihedral  Twist  Twist_Location  tip airfoil
    1  4     3           1          8     36.87  0               0         0      0.25            as above

VSPAERO settings: Sref=115.5 bref=22 cref=5.25 Xcg=1.986 Ycg=0 Zcg=0.123 AlphaStart=-5 AlphaEnd=15 AlphaNpts=50 BetaStart=0 BetaEnd=0 BetaNpts=1 MachStart=0 MachEnd=0 MachNpts=1 ReCref=1e+07 Vinf=100 Rho=0.002377
